# OpenSim document version 40500
AnalyzeTool:
  model_file: C:/Users/5W555A/Desktop/GRF/test data\Demo_SinglePerson_0-100_filt_butterworth_contact.osim
  replace_force_set: false
  results_directory: C:/Users/5W555A/Desktop/GRF/test data\ForceReporter
  output_precision: 8
  initial_time: 0
  final_time: 1.65
  solve_for_equilibrium_for_auxiliary_states: false
  maximum_number_of_integrator_steps: 20000
  maximum_integrator_step_size: 1
  minimum_integrator_step_size: 1e-8
  integrator_error_tolerance: 1e-5
  coordinates_file: C:/Users/5W555A/Desktop/GRF/test data/Demo_SinglePerson_0-100_filt_butterworth.mot
  lowpass_cutoff_frequency_for_coordinates: 8
  AnalysisSet Analyses:
    ForceReporter: start_time=0 end_time=1.65 step_interval=1 in_degrees=true include_constraint_forces=false
